*INCLUDE, INPUT=Component_c7430cd8_5bd2_49b6_bf7d_529cc8627b70.inp

*PHYSICAL CONSTANTS, ABSOLUTE ZERO = 0, STEFAN BOLTZMANN = 5.669E-8

*INITIAL CONDITIONS,TYPE=TEMPERATURE
Nall,293

*INCLUDE, INPUT=Materials.inp

*INCLUDE, INPUT=add_contact.inp
*INCLUDE, INPUT=contact_surfaces.inp

*STEP

*HEAT TRANSFER, STEADY STATE

*DFLUX
**INCLUDE, INPUT=Component_c7430cd8_5bd2_49b6_bf7d_529cc8627b70.dfl
*INCLUDE, INPUT=Component_c7430cd8_5bd2_49b6_bf7d_529cc8627b70.bfl
*INCLUDE, INPUT=Component_c7430cd8_5bd2_49b6_bf7d_529cc8627b70.hf
*INCLUDE, INPUT=Component_c7430cd8_5bd2_49b6_bf7d_529cc8627b70.bc


*RADIATE
*INCLUDE, INPUT=Component_c7430cd8_5bd2_49b6_bf7d_529cc8627b70.rad

*NODE FILE
NT
*EL File
HFL
*END STEP
