*INCLUDE, INPUT=Component_c7430cd8_5bd2_49b6_bf7d_529cc8627b70.inp

*PHYSICAL CONSTANTS, ABSOLUTE ZERO = 0, STEFAN BOLTZMANN = 5.669E-8

*INITIAL CONDITIONS,TYPE=TEMPERATURE
Nall,293
Component,NaN

*INCLUDE, INPUT=Materials.inp

*INCLUDE, INPUT=add_contact.inp
*INCLUDE, INPUT=contact_surfaces.inp
*TIME POINTS,NAME=T1,GENERATE
0,1.0,1.0

*STEP

*HEAT TRANSFER, DIRECT,
1.0,1.0

*DFLUX
**INCLUDE, INPUT=Component_c7430cd8_5bd2_49b6_bf7d_529cc8627b70.dfl
*INCLUDE, INPUT=Component_c7430cd8_5bd2_49b6_bf7d_529cc8627b70.bfl
*INCLUDE, INPUT=Component_c7430cd8_5bd2_49b6_bf7d_529cc8627b70.hf
*INCLUDE, INPUT=Component_c7430cd8_5bd2_49b6_bf7d_529cc8627b70.bc


*RADIATE
*INCLUDE, INPUT=Component_c7430cd8_5bd2_49b6_bf7d_529cc8627b70.rad

*NODE FILE
NT
*EL File
HFL
*END STEP
